Boeing 737-800

#Mach
 0.00

#IYsym   IZsym   Zsym
 0       0       0.0

#Sref    Cref    Bref
1260.0   11.0    113.0

#Xref    Yref    Zref
60.0     0.0     0.0

#--------------------------------------------------
SURFACE
Wing
!Nchordwise  Cspace  Nspanwise  Sspace
12           0.0     26         0.0

COMPONENT
1

YDUPLICATE
0.0

ANGLE
0.0

SCALE
1.0   1.0   0.07

TRANSLATE
50.0  0.0  0.0


!SECTION
!#Xle    Yle    Zle     Chord   Ainc  Nspanwise  Sspace
!-0.5    0.0    0.0     21.0    0.
!AFILE
!a1.dat

SECTION
#Xle    Yle    Zle     Chord   Ainc  Nspanwise  Sspace
-0.5    6.0    0.0     21.0    0.
AFILE
n2412.dat

SECTION
#Xle    Yle    Zle     Chord   Ainc  Nspanwise  Sspace
 2.167 10.0    6.0     18.333  0.
AFILE
n2412.dat

SECTION
#Xle    Yle    Zle     Chord   Ainc  Nspanwise  Sspace
 7.50  18.0   12.0     13.0    0.
AFILE
n2412.dat

SECTION
#Xle    Yle    Zle     Chord   Ainc  Nspanwise  Sspace
16.0   34.0   28.0      9.0    0.
AFILE
n2412.dat

SECTION
#Xle    Yle    Zle     Chord   Ainc  Nspanwise  Sspace
22.0   47.0   41.0      6.4    0.
AFILE
n2412.dat

SECTION
#Xle    Yle    Zle     Chord   Ainc  Nspanwise  Sspace
25.1   54.0   48.0      4.9    0.
AFILE
n2412.dat

SECTION
#Xle    Yle    Zle     Chord   Ainc  Nspanwise  Sspace
27.1   56.5   50.5      3.5    0.
AFILE
n2412.dat


#--------------------------------------------------
SURFACE
Stab
#Nchordwise  Cspace  Nspanwise  Sspace
6            0.0     15         0.0

COMPONENT
1

YDUPLICATE
0.0

SCALE
1.0  1.0  0.17

TRANSLATE
110.0  0.0  6.0

SECTION
#Xle    Yle    Zle     Chord   Ainc  Nspanwise  Sspace
-2.50   0.0    0.0     14.0    0.

SECTION
#Xle    Yle    Zle     Chord   Ainc  Nspanwise  Sspace
 2.00   6.0    6.0     11.5    0.    1          0.

SECTION
#Xle    Yle    Zle     Chord   Ainc  Nspanwise  Sspace
10.7    18.0   18.0    6.8     0.

SECTION
#Xle    Yle    Zle     Chord   Ainc  Nspanwise  Sspace
15.0    23.5   23.5    4.0     0.

#--------------------------------------------------
SURFACE
Fin
#Nchordwise  Cspace   Nspanwise  Sspace
7            0.0      11          0.0

COMPONENT
1

SCALE
1.0   1.0  1.0

TRANSLATE
95.0  0.0   6.0

SECTION
#Xle    Yle    Zle     Chord   Ainc  Nspanwise  Sspace
 0.0    0.0    0.0     26.5    0.

SECTION
#Xle    Yle    Zle     Chord   Ainc  Nspanwise  Sspace
13.0    0.0     5.0    14.5    0.

SECTION
#Xle    Yle    Zle     Chord   Ainc  Nspanwise  Sspace
28.0    0.0    25.0     4.0    0.
