Test_Wing
#Mach
0.0
#IYsym   IZsym   Zsym
 0       0       0.0
#Sref    Cref    Bref
 10.0  1.0  10.0
#Xref    Yref    Zref
 0.0  0.0  0.0

#======================================================
SURFACE
Main_Wing
#Nchordwise  Cspace  Nspanwise  Sspace
 12          0.0     20         0.0

YDUPLICATE
0.0

#------------------------------------------------------
SECTION
#Xle    Yle    Zle     Chord   Ainc  Nspanwise  Sspace
 0.0    0.0    0.0     1.0   0.0   0          0

SECTION
#Xle    Yle     Zle    Chord   Ainc  Nspanwise  Sspace
 0.0  5.0 0.0  1.0   0.0   0          0
